base

#Mach
 0.0

#Iysym   IZsym   Zsym
  0      0     0.0

#Sref    Cref    Bref 	<meters>
17.177368208      1.7399407099567097     10.166

#Xref    Yref    Zref   <meters>
2.239696797      0     -0.131189711


#---------------------------------------------------------
SURFACE
main_wing
#Nchordwise  Cspace   Nspanwise  Sspace
10         1.0         30      1.0

YDUPLICATE
0.0


SECTION
#Xle    Yle      Zle      Chord     Ainc  Nspanwise  Sspace
1.6526  0.0    -0.6007    2.1944    0.0

SECTION
#Xle    Yle      Zle      Chord     Ainc  Nspanwise  Sspace
1.7064  1.0166    -0.4668    1.9925    0.0
NACA
6410
CONTROL
flap    1.0   0.8   0. 0. 0.  +1

SECTION
#Xle    Yle      Zle      Chord     Ainc  Nspanwise  Sspace
1.7872  2.5415    -0.2661    1.6897    0.0
NACA
6410
CONTROL
flap    1.0   0.8   0. 0. 0.  +1

SECTION
#Xle    Yle      Zle      Chord     Ainc  Nspanwise  Sspace
1.8411  3.5581    -0.1322    1.4878    0.0
NACA
6410
CONTROL
aileron    -1.0   0.6438999999999999   0. 0. 0.  -1

SECTION
#Xle    Yle      Zle      Chord     Ainc  Nspanwise  Sspace
1.8949  4.5747    0.0016    1.2859    0.0
NACA
6410
CONTROL
aileron    -1.0   0.6438999999999999   0. 0. 0.  -1

SECTION
#Xle    Yle      Zle      Chord     Ainc  Nspanwise  Sspace
1.9219  5.083    0.0685    1.185    0.0
NACA
6410


#---------------------------------------------------------
SURFACE
horizontal_stabilizer
#Nchordwise  Cspace   Nspanwise  Sspace
10         1.0         30      1.0

YDUPLICATE
0.0


SECTION
#Xle    Yle      Zle      Chord     Ainc  Nspanwise  Sspace
6.5452  0.0    0.2039    1.1976    0.0

SECTION
#Xle    Yle      Zle      Chord     Ainc  Nspanwise  Sspace
6.5662  0.2    0.2039    1.1581    0.0
CONTROL
elevator    1.0   0.6044   0. 0. 0.  +1

SECTION
#Xle    Yle      Zle      Chord     Ainc  Nspanwise  Sspace
6.7344  1.8    0.2039    0.8419    0.0
CONTROL
elevator    1.0   0.6044   0. 0. 0.  +1

SECTION
#Xle    Yle      Zle      Chord     Ainc  Nspanwise  Sspace
6.7554  2.0    0.2039    0.8024    0.0


#---------------------------------------------------------
SURFACE
vertical_stabilizer
#Nchordwise  Cspace   Nspanwise  Sspace
10         1.0         30      -1.1

SECTION
#Xle    Yle      Zle      Chord     Ainc  Nspanwise  Sspace
7.1274  0.0    0.3038    1.0594    0.0

SECTION
#Xle    Yle      Zle      Chord     Ainc  Nspanwise  Sspace
7.1813  0.0    0.4519    1.0045    0.0
CONTROL
rudder    1.0   0.47829999999999995   0. 0. 0.  +1

SECTION
#Xle    Yle      Zle      Chord     Ainc  Nspanwise  Sspace
7.6127  0.0    1.6372    0.5655    0.0
CONTROL
rudder    1.0   0.47829999999999995   0. 0. 0.  +1

SECTION
#Xle    Yle      Zle      Chord     Ainc  Nspanwise  Sspace
7.6666  0.0    1.7853    0.5106    0.0
